atom_style	sphere
boundary	p p f
newton		off
comm_modify	vel yes
neighbor	0.2 bin
neigh_modify	delay 0
variable        w2 equal 10
variable        h2 equal 20

region			box block -${w2} ${w2} -${w2} ${w2} -${h2} ${h2} units box
create_box	3 box


variable d1         equal 1.0   #cylinder material
variable d2         equal 1.0   #measure material
variable d3         equal 1.0   #poured material
variable fcSp       equal 10
variable cylInRad   equal 3.5
variable in_cylr     equal "v_cylInRad+v_d3/2.0"
variable out_cylr    equal "v_in_cylr+v_d3"

variable t0     equal "sqrt(v_d/v_g)"
variable v0     equal "sqrt(v_d/v_g)"
#########bottom plate##############
lattice fcc ${fcSp} origin 0 0 0
region measure block -5 5 -5 5 -16.2 -15.5 units box
create_atoms	1 region measure
set type 1 diameter ${d1}
group measure region measure
#########cylinder##############

lattice fcc ${fcSp} origin 0 0 0
region in_cyl cylinder z    0 0 ${in_cylr}        -15 10 units box side out        #rad=4
region out_cyl cylinder z   0 0 ${out_cylr}    -15 10 units box side in         #rad=5
region cyl intersect 2 in_cyl out_cyl
create_atoms	2 region cyl
set type 2 diameter ${d2}
group cyl region cyl

#visualize half of cylinder
region visCyl cylinder z -${in_cylr}  0 ${in_cylr}  -15 10 units box
group visCyl region visCyl


#########poured material##############
lattice fcc ${d3} origin 0 0 0
print "!!!!!!!!!!!!!!!!!!"
region pouredParts cylinder z 0 0 3 7 12 units box side in
set type 3 diameter ${d3}
group pouredParts type 3

######freeze non-moving##############
group freezeGroup union cyl measure
fix     1 freezeGroup freeze


#####add gravity to poured particles#######
fix		2 pouredParts gravity 1.0 spherical 0.0 -180.0

#set sim params
##from pdf, maybe should change stiffness to 2e5?
# http://lammps.sandia.gov/doc/units.html units in lammps
#lj units
variable k0     equal 0.1633 #if change sim params must change this!
variable mup    equal 0.5
variable muw    equal 0.5
variable kn     equal "2*10^6*v_k0"

variable kt     equal "2/7*v_kn" # 2/7kn or 2/(7kn) check this value!
variable g_n    equal "50"
variable g_t    equal "50"


timestep .001

run_style verlet

fix		3 all nve/sphere  #integrator type

#http://lammps.sandia.gov/doc/fix_wall_gran.html
#history means shear history effects are being used
pair_style      gran/hertz/history ${kn} ${kt} ${g_n} ${g_t} ${mup} 1

pair_coeff	* *
compute		1 all erotate/sphere
compute     FRCE measure group/group pouredParts

thermo_style	custom step atoms ke c_1 vol
thermo		100
thermo_modify	lost ignore norm no
compute_modify	thermo_temp dynamic yes

#######pour in particles
fix		ins pouredParts pour 1000 3 300719 vol 0.13 50 region pouredParts
# velocity pouredParts create .25 4928459 rot yes dist gaussian


group temp intersect cyl visCyl
group temp2 union temp measure

dump		1 pouredParts movie 1000 FillContainer.mpg type type &
            axes yes 0.8 0.02 view 80 -30  #80 -30
dump_modify 1 adiam 1 ${d1} adiam 2 ${d2} adiam 3 ${d3}


variable fx equal c_FRCE[1]
variable fy equal c_FRCE[2]
variable fz equal c_FRCE[3]
# variable fe equal c_FRCE[0]
variable ss equal step
fix forcePrint measure print 100 "${ss} ${fx} ${fy} ${fz}" file forces.txt screen no
run		100000

#turn on langevins equations
undump 1

fix lang pouredParts langevin 5 10 100.0 48279
# group visGroup union pouredParts measure
group visGroup union pouredParts temp2
dump		2 all atom 100 Langevin.lammpstrj
dump		3 visGroup movie 1000 Langevin.mpg type type &
            axes yes 0.8 0.02 view 80 -30
dump_modify 3 adiam 1 ${d1} adiam 2 ${d2} adiam 3 ${d3}
dump		4 all xyz   100 Langevin.xyz
run		50000
